dd_1(x_1, x_2, x_3, y_2, y_3, z_3, R_1, R_2, R_3, R_0) := 2*R_1*R_0 + R_1^2 - x_1^2
dd_2(x_1, x_2, x_3, y_2, y_3, z_3, R_1, R_2, R_3, R_0) := 2*R_2*R_0 + R_2^2 - x_2^2 - y_2^2
dd_3(x_1, x_2, x_3, y_2, y_3, z_3, R_1, R_2, R_3, R_0) := 2*R_3*R_0 + R_3^2 - x_3^2 - y_3^2 - z_3^2
d(x_1, x_2, x_3, y_2, y_3, z_3, R_1, R_2, R_3, R_0) := -8*x_1*y_2*z_3
d_1(x_1, x_2, x_3, y_2, y_3, z_3, R_1, R_2, R_3, R_0) := 4*(dd_1(x_1, x_2, x_3, y_2, y_3, z_3, R_1, R_2, R_3, R_0)*y_2*z_3)
d_2(x_1, x_2, x_3, y_2, y_3, z_3, R_1, R_2, R_3, R_0) := 4*(x_1*z_3*dd_2(x_1, x_2, x_3, y_2, y_3, z_3, R_1, R_2, R_3, R_0) - x_2*z_3*dd_1(x_1, x_2, x_3, y_2, y_3, z_3, R_1, R_2, R_3, R_0))
d_3(x_1, x_2, x_3, y_2, y_3, z_3, R_1, R_2, R_3, R_0) := 4*(x_1*y_2*dd_3(x_1, x_2, x_3, y_2, y_3, z_3, R_1, R_2, R_3, R_0) + x_2*y_3*dd_1(x_1, x_2, x_3, y_2, y_3, z_3, R_1, R_2, R_3, R_0) - x_1*y_3*dd_2(x_1, x_2, x_3, y_2, y_3, z_3, R_1, R_2, R_3, R_0) - x_3*y_2*dd_1(x_1, x_2, x_3, y_2, y_3, z_3, R_1, R_2, R_3, R_0))
x(x_1, x_2, x_3, y_2, y_3, z_3, R_1, R_2, R_3, R_0) := d_1(x_1, x_2, x_3, y_2, y_3, z_3, R_1, R_2, R_3, R_0)/d(x_1, x_2, x_3, y_2, y_3, z_3, R_1, R_2, R_3, R_0) → -(R_1^2 + 2*R_0*R_1 - x_1^2)/(2*x_1)
y(x_1, x_2, x_3, y_2, y_3, z_3, R_1, R_2, R_3, R_0) := d_2(x_1, x_2, x_3, y_2, y_3, z_3, R_1, R_2, R_3, R_0)/d(x_1, x_2, x_3, y_2, y_3, z_3, R_1, R_2, R_3, R_0) → (4*x_2*z_3*(R_1^2 + 2*R_0*R_1 - x_1^2) - 4*x_1*z_3*(R_2^2 + 2*R_0*R_2 - x_2^2 - y_2^2))/(8*x_1*y_2*z_3)
z(x_1, x_2, x_3, y_2, y_3, z_3, R_1, R_2, R_3, R_0) := d_3(x_1, x_2, x_3, y_2, y_3, z_3, R_1, R_2, R_3, R_0)/d(x_1, x_2, x_3, y_2, y_3, z_3, R_1, R_2, R_3, R_0) → (4*x_1*y_2*(x_3^2 - 2*R_0*R_3 - R_3^2 + y_3^2 + z_3^2) - 4*x_2*y_3*(R_1^2 + 2*R_0*R_1 - x_1^2) + 4*x_3*y_2*(R_1^2 + 2*R_0*R_1 - x_1^2) + 4*x_1*y_3*(R_2^2 + 2*R_0*R_2 - x_2^2 - y_2^2))/(8*x_1*y_2*z_3)
x(x_1, x_2, x_3, y_2, y_3, z_3, R_1, R_2, R_3, R_0)^2 + y(x_1, x_2, x_3, y_2, y_3, z_3, R_1, R_2, R_3, R_0)^2 + z(x_1, x_2, x_3, y_2, y_3, z_3, R_1, R_2, R_3, R_0)^2 - R_0^2 == 0
a*R_0^2 + b*R_0 + c == 0
D == b^2 - 4*a*c
R_0 == (-b + sqrt(D))/2
R_0 == (-b - sqrt(D))/2
